# OpenSim document version 40500
IKTaskSet ik_tasks:
  IKMarkerTask RASI: apply=true weight=20
  IKMarkerTask LASI: apply=true weight=20
  IKMarkerTask RPSI: apply=true weight=20
  IKMarkerTask LPSI: apply=true weight=20
  IKMarkerTask RTH1: apply=true weight=10
  IKMarkerTask RTH2: apply=true weight=10
  IKMarkerTask RTH3: apply=true weight=10
  IKMarkerTask LTH1: apply=true weight=10
  IKMarkerTask LTH2: apply=true weight=10
  IKMarkerTask LTH3: apply=true weight=10
  IKMarkerTask RTB1: apply=true weight=10
  IKMarkerTask RTB2: apply=true weight=10
  IKMarkerTask RTB3: apply=true weight=10
  IKMarkerTask LTB1: apply=true weight=10
  IKMarkerTask LTB2: apply=true weight=10
  IKMarkerTask LTB3: apply=true weight=10
  IKMarkerTask RLFC: apply=true weight=5
  IKMarkerTask RMFC: apply=true weight=5
  IKMarkerTask LLFC: apply=true weight=5
  IKMarkerTask LMFC: apply=true weight=5
  IKMarkerTask RLMAL: apply=true weight=5
  IKMarkerTask RMMAL: apply=true weight=5
  IKMarkerTask LLMAL: apply=true weight=5
  IKMarkerTask LMMAL: apply=true weight=5
  IKMarkerTask RCAL: apply=true weight=5
  IKMarkerTask RTOE: apply=true weight=3
  IKMarkerTask RMT5: apply=true weight=3
  IKMarkerTask LCAL: apply=true weight=5
  IKMarkerTask LTOE: apply=true weight=3
  IKMarkerTask LMT5: apply=true weight=3
  IKMarkerTask C7: apply=true weight=3
  IKMarkerTask CLAV: apply=true weight=3
  IKMarkerTask RACR: apply=true weight=2
  IKMarkerTask LACR: apply=true weight=2
  IKMarkerTask RASH: apply=true weight=1
  IKMarkerTask RPSH: apply=true weight=1
  IKMarkerTask LASH: apply=true weight=1
  IKMarkerTask LPSH: apply=true weight=1
  IKMarkerTask RLEL: apply=true weight=1
  IKMarkerTask RMEL: apply=true weight=1
  IKMarkerTask LLEL: apply=true weight=1
  IKMarkerTask LMEL: apply=true weight=1
